a := 0
b := π
n := 10
method2 :=
    for i ∈ 0 .. n
        x[i] ← π/(i + 1)
        f[i] ← sin(x[i])
    A1 ← [
        sum(x[i]^0, i = 0 .. n), sum(x[i]^1, i = 0 .. n), sum(x[i]^2, i = 0 .. n);
        sum(x[i]^1, i = 0 .. n), sum(x[i]^2, i = 0 .. n), sum(x[i]^3, i = 0 .. n);
        sum(x[i]^2, i = 0 .. n), sum(x[i]^3, i = 0 .. n), sum(x[i]^4, i = 0 .. n)
    ]
    b1 ← [sum(f[i], i = 0 .. n); sum(f[i]*x[i], i = 0 .. n); sum(f[i]*x[i]^2, i = 0 .. n)]
    x ← lsolve(A1, b1)
A := [
    integral(1, x = a .. b), integral(x, x = a .. b), integral(x^2, x = a .. b);
    integral(x, x = a .. b), integral(x^2, x = a .. b), integral(x^3, x = a .. b);
    integral(x^2, x = a .. b), integral(x^3, x = a .. b), integral(x^4, x = a .. b)
]
b := [integral(cos(x), x = a .. b); integral(cos(x)*x, x = a .. b); integral(cos(x)*x^2, x = a .. b)]
A simplify → [π, π^2/2, π^3/3; π^2/2, π^3/3, π^4/4; π^3/3, π^4/4, π^5/5]
b simplify → [0; -2; -2*π]
lsolve(A, b) = [1.21585; -0.774037; 0]
method2 = [-0.0754769; 1.33267; -0.416383]
# Среднеквадратичное приближение
# метод наименьших
# квадратов
P_2(x) := 1.216 - 0.774*x + 2.462*10^-15*x^2
# [plot: cos(x), P_2(x) vs x]
P_2(x) := -0.075 + 1.333*x - 0.416*x^2
# [plot: sin(x), P_2(x) vs x]
